# in.kg_polyampholyte_090k_120k
# Charged bead-spring melt (alternating +/-1 beads, 1,800 chains of 50), PPPM.
# Related to kg_chain050_202k_360k: adds charges and PPPM, smaller box 100x30x30 (expected impact: high).
# Requires: MOLECULE KSPACE

units           lj
atom_style      full
boundary        p p p

variable        nx equal 100
variable        ny equal 30
variable        L equal 50
variable        nsteps equal 120000

lattice         custom 0.8520064 a1 0.97 0.0 0.0 a2 0.0 1.1 0.0 a3 0.0 0.0 1.1 basis 0.0 0.0 0.0
region          box block 0 ${nx} 0 ${ny} 0 ${ny}
create_box      1 box bond/types 1 extra/bond/per/atom 2 extra/special/per/atom 6
create_atoms    1 box
variable        ix atom floor(x/0.97+0.5)
variable        qa atom 2*(v_ix%2)-1
set             group all charge v_qa

mass            1 1.0

pair_style      lj/cut 1.122462
pair_modify     shift yes
pair_coeff      1 1 1.0 1.0 1.122462
bond_style      fene
bond_coeff      1 30.0 1.5 1.0 1.0
special_bonds   fene

neighbor        0.4 bin
neigh_modify    delay 0 every 1 check yes
comm_modify     cutoff 2.0

create_bonds    many all all 1 0.96 0.98
variable        cut atom "(v_ix % v_L) == 0 || (v_ix % v_L) == (v_L-1)"
group           chainends variable cut
delete_bonds    chainends bond 1 remove special

pair_style      lj/cut/coul/long 1.122462 5.0
pair_modify     shift yes
pair_coeff      1 1 1.0 1.0 1.122462
kspace_style    pppm 1.0e-4

velocity        all create 1.0 53124 loop geom

timestep        0.01
fix             1 all nve
fix             2 all langevin 1.0 1.0 10.0 90210

thermo          500
thermo_style    custom step temp pe ebond elong press

run             ${nsteps}
