# in.lj_base_256k_160k_wca
# Purely repulsive WCA fluid (LJ cut at 2^(1/6), shifted).
# Variant of lj_base_256k_160k: cutoff 2.5 -> 1.122462 with energy shift (WCA) (expected impact: high).

units           lj
atom_style      atomic
boundary        p p p

variable        nx equal 40
variable        rho equal 0.8442
variable        temp equal 1.0
variable        rc equal 1.122462
variable        nsteps equal 160000

lattice         fcc ${rho}
region          box block 0 ${nx} 0 ${nx} 0 ${nx}
create_box      1 box
create_atoms    1 box

mass            1 1.0

velocity        all create ${temp} 87287 loop geom

pair_style      lj/cut ${rc}
pair_coeff      1 1 1.0 1.0 ${rc}
pair_modify     shift yes

neighbor        0.3 bin
neigh_modify    delay 0 every 1 check yes

fix             1 all nve

thermo          100
thermo_style    custom step temp pe ke etotal press density

run             ${nsteps}
