# in.lj_stairup_512k_300k
# LJ melt doubled four times with replicate (32k -> 512k atoms), 60k steps per stage.
# Independent: staircase memory profile. Same physics as lj_base_256k_160k.

units           lj
atom_style      atomic
boundary        p p p

variable        temp equal 1.0
variable        nstage equal 60000

lattice         fcc 0.8442
region          box block 0 20 0 20 0 20
create_box      1 box
create_atoms    1 box

mass            1 1.0

velocity        all create ${temp} 87287 loop geom

pair_style      lj/cut 2.5
pair_coeff      1 1 1.0 1.0 2.5

neighbor        0.3 bin
neigh_modify    delay 0 every 1 check yes

fix             1 all nve

thermo          500
thermo_style    custom step atoms temp pe ke etotal press

run             ${nstage}
replicate       2 1 1
run             ${nstage}
replicate       1 2 1
run             ${nstage}
replicate       1 1 2
run             ${nstage}
replicate       2 1 1 bbox
run             ${nstage}
